OpenVSP model (file version 5), 1 components.
Geometry view with OpenVSP parameter names; values to 6 digits, angles in degrees, lengths in the model's unit.
Overall bounding box: X_Min=0 X_Len=1 Y_Min=-9 Y_Len=18 Z_Min=-0.05 Z_Len=0.1

Wing "WingGeom"
  location (X Y Z) 0 0 0, rotation 0 0 0
  symmetric about XZ
  bounding box size 1 18 0.1
  totals: TotalSpan=18 TotalProjectedSpan=18 TotalChord=1 TotalArea=18 TotalAR=18
  root: chord 1, twist 0, airfoil file ""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 BaseThickChord=1 ThickChord=0.0952381
  sections:
    n  Span  Root_Chord  Tip_Chord  Area  Sweep  Sweep_Location  Dihedral  Twist  Twist_Location  tip airfoil
    1  9     1           1          9     0      0               0         0      0               airfoil file ""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 BaseThickChord=1 ThickChord=0.1
